// SBML level 3 version 2
// Created with https://github.com/matthiaskoenig/sbmlutils.

model debug_model()
  // Debug Model
  // model units - substance: substance, time: time, volume: volume

  // Compartments:
  compartment Cytoplasm = 5.25e-12 volume;  // GO:0005737
  compartment Extracellular = 8e-8 volume;  // GO:0005576
  compartment Nucleus = 1.75e-12 volume;  // GO:0005634
  compartment Mitochondria = 3.675e-13 volume;  // GO:0005739

  // Species:
  species ext_drug__alpelisib_ in Extracellular = 0;
  species cyt_drug__alpelisib_ in Cytoplasm = 0;
  species cyt_cong__alpelisib__PIK3C_1_ in Cytoplasm = 0;
  species cyt_cong__alpelisib__PIK3C__PIK3R_1_ in Cytoplasm = 0;

  // Parameters:
  kAlp1_1 = 0.01;
  kAlp1_2 = 5.25e-12;
  kAlp1_3 = 8e-8;
  kAlp2_1 = 0.01;
  kAlp3_1 = 0.001;
  kAlp4_1 = 0.0024;
  kAlp5_1 = 4.81e-6;
  kAlp6_1 = 0.001;
  kAlp7_1 = 0.0024;
  kAlp8_1 = 4.81e-6;

  // Reactions:
  vAlp1: ext_drug__alpelisib_ => cyt_drug__alpelisib_; kAlp1_1*(kAlp1_2/kAlp1_3)*ext_drug__alpelisib_*Extracellular;
  vAlp2: cyt_drug__alpelisib_ => ext_drug__alpelisib_; kAlp2_1*Cytoplasm;
  vAlp3: cyt_drug__alpelisib_ => cyt_cong__alpelisib__PIK3C_1_; kAlp3_1*Cytoplasm;
  vAlp4: cyt_cong__alpelisib__PIK3C_1_ => cyt_drug__alpelisib_; kAlp4_1*Cytoplasm;
  vAlp5: cyt_cong__alpelisib__PIK3C_1_ => ; kAlp5_1*Cytoplasm;
  vAlp6: cyt_drug__alpelisib_ => cyt_cong__alpelisib__PIK3C__PIK3R_1_; kAlp6_1*Cytoplasm;
  vAlp7: cyt_cong__alpelisib__PIK3C__PIK3R_1_ => cyt_drug__alpelisib_; kAlp7_1*Cytoplasm;
  vAlp8: cyt_cong__alpelisib__PIK3C__PIK3R_1_ => ; kAlp8_1*Cytoplasm;

  // Unit definitions:
  unit nM = 1e-9 mole / litre; nM is "nanomole/litre";
  unit substance = 1e-9 mole; substance is "nanomole";
  unit time = second; time is "second";
  unit volume = litre; volume is "litre";
end
