// SBML level 3 version 2
// Created with https://github.com/matthiaskoenig/sbmlutils.

model sparced_s_lapatinib_submodel()
  // SPARCED's Lapatinib submodel
  // model units - substance: substance, time: time, volume: volume

  // Compartments:
  compartment Cytoplasm = 5.25e-12 volume;  // GO:0005737
  compartment Extracellular = 8e-8 volume;  // GO:0005576
  compartment Nucleus = 1.75e-12 volume;  // GO:0005634
  compartment Mitochondria = 3.675e-13 volume;  // GO:0005739

  // Species:
  species ext_comp__lapatinib_ in Extracellular = 0;
  species cyt_comp_in__lapatinib_ in Cytoplasm = 0;
  species cyt_cong__EGFR_1__lapatinib_ in Cytoplasm = 0;
  species cyt_cong__ERBB2_1__lapatinib_ in Cytoplasm = 0;
  species cyt_cong__ERBB4_1__lapatinib_ in Cytoplasm = 0;
  species cyt_prot__EGFR_1_ in Cytoplasm = 0;  // uniprot:P00533-1
  species cyt_prot__ERBB2_1_ in Cytoplasm = 0;  // uniprot:P04626-1
  species cyt_prot__ERBB4_1_ in Cytoplasm = 0;  // uniprot:Q15303-1

  // Parameters:
  kLap1_1 = 0.01;
  kLap2_1 = 0.01;
  kLap3_1 = 0.001;
  kLap4_1 = 0.0024;
  kLap5_1 = 1.51e-5;
  kLap6_1 = 0.001;
  kLap7_1 = 0.007;
  kLap8_1 = 1.04e-5;
  kLap9_1 = 0.01;
  kLap10_1 = 0.54;
  kLap11_1 = 0;

  // Reactions:
  vLap1: ext_comp__lapatinib_ => cyt_comp_in__lapatinib_; kLap1_1*(Cytoplasm/Extracellular)*ext_comp__lapatinib_*Extracellular;
  vLap2: cyt_comp_in__lapatinib_ => ext_comp__lapatinib_; kLap2_1*Cytoplasm;
  vLap3: cyt_comp_in__lapatinib_ + cyt_prot__EGFR_1_ => cyt_cong__EGFR_1__lapatinib_; kLap3_1*Cytoplasm;
  vLap4: cyt_cong__EGFR_1__lapatinib_ => cyt_comp_in__lapatinib_ + cyt_prot__EGFR_1_; kLap4_1*Cytoplasm;
  vLap5: cyt_cong__EGFR_1__lapatinib_ => ; kLap5_1*Cytoplasm;
  vLap6: cyt_comp_in__lapatinib_ + cyt_prot__ERBB2_1_ => cyt_cong__ERBB2_1__lapatinib_; kLap6_1*Cytoplasm;
  vLap7: cyt_cong__ERBB2_1__lapatinib_ => cyt_comp_in__lapatinib_; kLap7_1*Cytoplasm;
  vLap8: cyt_cong__ERBB2_1__lapatinib_ => ; kLap8_1*Cytoplasm;
  vLap9: cyt_comp_in__lapatinib_ + cyt_prot__ERBB4_1_ => cyt_cong__ERBB4_1__lapatinib_; kLap9_1*Cytoplasm;
  vLap10: cyt_cong__ERBB4_1__lapatinib_ => cyt_comp_in__lapatinib_ + cyt_prot__ERBB4_1_; kLap10_1*Cytoplasm;
  vLap11: cyt_cong__ERBB4_1__lapatinib_ => ; kLap11_1*Cytoplasm;

  // Unit definitions:
  unit nM = 1e-9 mole / litre; nM is "nanomole/litre";
  unit substance = 1e-9 mole; substance is "nanomole";
  unit time = second; time is "second";
  unit volume = litre; volume is "litre";
end
