// SBML level 3 version 2
// Created with https://github.com/matthiaskoenig/sbmlutils.

model sparced_s_neratinib_submodel()
  // SPARCED's Neratinib submodel
  // model units - substance: substance, time: time, volume: volume

  // Compartments:
  compartment Cytoplasm = 5.25e-12 volume;  // GO:0005737
  compartment Extracellular = 8e-8 volume;  // GO:0005576
  compartment Nucleus = 1.75e-12 volume;  // GO:0005634
  compartment Mitochondria = 3.675e-13 volume;  // GO:0005739

  // Species:
  species ext_comp__neratinib_ in Extracellular = 0;
  species cyt_comp_in__neratinib_ in Cytoplasm = 0;
  species cyt_cong__EGFR_1__neratinib_ in Cytoplasm = 0;
  species cyt_cong__ERBB2_1__neratinib_ in Cytoplasm = 0;
  species cyt_cong__ERBB4_1__neratinib_ in Cytoplasm = 0;
  species cyt_prot__EGFR_1_ in Cytoplasm = 0;  // uniprot:P00533-1
  species cyt_prot__ERBB2_1_ in Cytoplasm = 0;  // uniprot:P04626-1
  species cyt_prot__ERBB4_1_ in Cytoplasm = 0;  // uniprot:Q15303-1

  // Parameters:
  kNer1_1 = 0.01;
  kNer2_1 = 0.01;
  kNer3_1 = 0.0001;
  kNer4_1 = 0;
  kNer5_1 = 1.51e-5;
  kNer6_1 = 0.0001;
  kNer7_1 = 0;
  kNer8_1 = 1.04e-5;
  kNer9_1 = 0.0001;
  kNer10_1 = 0;
  kNer11_1 = 0;

  // Reactions:
  vNer1: ext_comp__neratinib_ => cyt_comp_in__neratinib_; kNer1_1*(Cytoplasm/Extracellular)*ext_comp__neratinib_*Extracellular;
  vNer2: cyt_comp_in__neratinib_ => ext_comp__neratinib_; kNer2_1*Cytoplasm;
  vNer3: cyt_comp_in__neratinib_ + cyt_prot__EGFR_1_ => cyt_cong__EGFR_1__neratinib_; kNer3_1*Cytoplasm;
  vNer4: cyt_cong__EGFR_1__neratinib_ => cyt_comp_in__neratinib_ + cyt_prot__EGFR_1_; kNer4_1*Cytoplasm;
  vNer5: cyt_cong__EGFR_1__neratinib_ => ; kNer5_1*Cytoplasm;
  vNer6: cyt_comp_in__neratinib_ + cyt_prot__ERBB2_1_ => cyt_cong__ERBB2_1__neratinib_; kNer6_1*Cytoplasm;
  vNer7: cyt_cong__ERBB2_1__neratinib_ => cyt_comp_in__neratinib_; kNer7_1*Cytoplasm;
  vNer8: cyt_cong__ERBB2_1__neratinib_ => ; kNer8_1*Cytoplasm;
  vNer9: cyt_comp_in__neratinib_ + cyt_prot__ERBB4_1_ => cyt_cong__ERBB4_1__neratinib_; kNer9_1*Cytoplasm;
  vNer10: cyt_cong__ERBB4_1__neratinib_ => cyt_comp_in__neratinib_ + cyt_prot__ERBB4_1_; kNer10_1*Cytoplasm;
  vNer11: cyt_cong__ERBB4_1__neratinib_ => ; kNer11_1*Cytoplasm;

  // Unit definitions:
  unit nM = 1e-9 mole / litre; nM is "nanomole/litre";
  unit substance = 1e-9 mole; substance is "nanomole";
  unit time = second; time is "second";
  unit volume = litre; volume is "litre";
end
