// SBML level 3 version 2
// Created with https://github.com/matthiaskoenig/sbmlutils.

model sparced_s_trametinib_submodel()
  // SPARCED's Trametinib submodel
  // model units - substance: substance, time: time, volume: volume

  // Compartments:
  compartment Cytoplasm = 5.25e-12 volume;  // GO:0005737
  compartment Extracellular = 8e-8 volume;  // GO:0005576
  compartment Nucleus = 1.75e-12 volume;  // GO:0005634
  compartment Mitochondria = 3.675e-13 volume;  // GO:0005739

  // Species:
  species ext_comp__trametinib_ in Extracellular = 0;
  species cyt_comp_in__trametinib_ in Cytoplasm = 0;
  species cyt_cong__p_MAPK__trametinib_ in Nucleus = 0;
  species cyt_cong__p_MAPK_ in Nucleus = 0;  // uniprot:P28482 uniprot:P27361

  // Parameters:
  kTra1_1 = 0.01;
  kTra2_1 = 0.01;
  kTra3_1 = 0.1;
  kTra4_1 = 0.35;
  kTra5_1 = 2.22e-6;

  // Reactions:
  vTra1: ext_comp__trametinib_ => cyt_comp_in__trametinib_; kTra1_1*(Cytoplasm/Extracellular)*ext_comp__trametinib_*Extracellular;
  vTra2: cyt_comp_in__trametinib_ => ext_comp__trametinib_; kTra2_1*Cytoplasm;
  vTra3: cyt_comp_in__trametinib_ + cyt_cong__p_MAPK_ => cyt_cong__p_MAPK__trametinib_; kTra3_1*Cytoplasm;
  vTra4: cyt_cong__p_MAPK__trametinib_ => cyt_comp_in__trametinib_ + cyt_cong__p_MAPK_; kTra4_1*Cytoplasm;
  vTra5: cyt_cong__p_MAPK__trametinib_ => ; kTra5_1*Cytoplasm;

  // Unit definitions:
  unit nM = 1e-9 mole / litre; nM is "nanomole/litre";
  unit substance = 1e-9 mole; substance is "nanomole";
  unit time = second; time is "second";
  unit volume = litre; volume is "litre";
end
