// SBML level 3 version 2
// Created with https://github.com/matthiaskoenig/sbmlutils.

model debug_model()
  // Debug Model
  // model units - substance: substance, time: time, volume: volume

  // Compartments:
  compartment Cytoplasm = 5.25e-12 volume;  // GO:0005737
  compartment Extracellular = 8e-8 volume;  // GO:0005576
  compartment Nucleus = 1.75e-12 volume;  // GO:0005634
  compartment Mitochondria = 3.675e-13 volume;  // GO:0005739

  // Species:
  species ext_drug__lapatinib_ in Extracellular = 0;
  species cyt_drug__lapatinib_ in Cytoplasm = 0;
  species cyt_cong__lapatinib__EGFR_1_ in Cytoplasm = 0;
  species cyt_cong__lapatinib__ERBB2_1_ in Cytoplasm = 0;
  species cyt_cong__lapatinib__ERBB4_1_ in Cytoplasm = 0;

  // Parameters:
  kLap1_1 = 0.01;
  kLap1_2 = 5.25e-12;
  kLap1_3 = 8e-8;
  kLap2_1 = 0.01;
  kLap3_1 = 0.001;
  kLap4_1 = 0.0024;
  kLap5_1 = 1.51e-5;
  kLap6_1 = 0.001;
  kLap7_1 = 0.007;
  kLap8_1 = 1.04e-5;
  kLap9_1 = 0.01;
  kLap10_1 = 0.54;
  kLap11_1 = 0;

  // Reactions:
  vLap1: ext_drug__lapatinib_ => cyt_drug__lapatinib_; kLap1_1*(kLap1_2/kLap1_3)*ext_drug__lapatinib_*Extracellular;
  vLap2: cyt_drug__lapatinib_ => ext_drug__lapatinib_; kLap2_1*Cytoplasm;
  vLap3: cyt_drug__lapatinib_ => cyt_cong__lapatinib__EGFR_1_; kLap3_1*Cytoplasm;
  vLap4: cyt_cong__lapatinib__EGFR_1_ => cyt_drug__lapatinib_; kLap4_1*Cytoplasm;
  vLap5: cyt_cong__lapatinib__EGFR_1_ => ; kLap5_1*Cytoplasm;
  vLap6: cyt_drug__lapatinib_ => cyt_cong__lapatinib__ERBB2_1_; kLap6_1*Cytoplasm;
  vLap7: cyt_cong__lapatinib__ERBB2_1_ => cyt_drug__lapatinib_; kLap7_1*Cytoplasm;
  vLap8: cyt_cong__lapatinib__ERBB2_1_ => ; kLap8_1*Cytoplasm;
  vLap9: cyt_drug__lapatinib_ => cyt_cong__lapatinib__ERBB4_1_; kLap9_1*Cytoplasm;
  vLap10: cyt_cong__lapatinib__ERBB4_1_ => cyt_drug__lapatinib_; kLap10_1*Cytoplasm;
  vLap11: cyt_cong__lapatinib__ERBB4_1_ => ; kLap11_1*Cytoplasm;

  // Unit definitions:
  unit nM = 1e-9 mole / litre; nM is "nanomole/litre";
  unit substance = 1e-9 mole; substance is "nanomole";
  unit time = second; time is "second";
  unit volume = litre; volume is "litre";
end
